# OpenSim document version 40500
ScaleTool Rajagopal_2015-scaled:
  mass: 100 [kg]
  height: -1
  age: -1
  sex: Female
  GenericModelMaker:
    model_file: ../../OpenSim/Models/Rajagopal/Rajagopal_2015.osim
    marker_set_file: vicon_markers.xml
  ModelScaler:
    apply: true
    scaling_order: measurements
    marker_file: vicon_static.trc
    time_range: -1 -1
    preserve_mass_distribution: true
    MeasurementSet:
      Measurement shoulders: apply=true
        MarkerPair: markers=(RSHO LSHO)
        BodyScale torso: axes=(X Y Z)
      Measurement pelvis: apply=true
        MarkerPair: markers=(RPSI LPSI)
        BodyScale pelvis: axes=(X Y Z)
        BodyScale femur_r: axes=(X Y Z)
        BodyScale tibia_r: axes=(X Y Z)
        BodyScale patella_r: axes=(X Y Z)
        BodyScale talus_r: axes=(X Y Z)
        BodyScale calcn_r: axes=(X Y Z)
        BodyScale toes_r: axes=(X Y Z)
        BodyScale femur_l: axes=(X Y Z)
        BodyScale tibia_l: axes=(X Y Z)
        BodyScale patella_l: axes=(X Y Z)
        BodyScale talus_l: axes=(X Y Z)
        BodyScale calcn_l: axes=(X Y Z)
        BodyScale toes_l: axes=(X Y Z)
      Measurement upper_arm: apply=true
        MarkerPair: markers=(RSHO RELB)
        BodyScale humerus_r: axes=(X Y Z)
        BodyScale humerus_l: axes=(X Y Z)
      Measurement lower_arm: apply=true
        MarkerPair: markers=(LELB LWRA)
        BodyScale ulna_r: axes=(X Y Z)
        BodyScale radius_r: axes=(X Y Z)
        BodyScale hand_r: axes=(X Y Z)
        BodyScale ulna_l: axes=(X Y Z)
        BodyScale radius_l: axes=(X Y Z)
        BodyScale hand_l: axes=(X Y Z)
  MarkerPlacer:
    apply: true
    marker_file: vicon_static.trc
    time_range: -1 -1
    max_marker_movement: -1
    IKTaskSet:
      IKMarkerTask CLAV: apply=true weight=1
      IKMarkerTask STRN: apply=true weight=1
      IKMarkerTask RSHO: apply=true weight=1
      IKMarkerTask LSHO: apply=true weight=1
      IKMarkerTask C7: apply=true weight=1
      IKMarkerTask T10: apply=true weight=1
      IKMarkerTask RUPA: apply=true weight=1
      IKMarkerTask RELB: apply=true weight=1
      IKMarkerTask RFRM: apply=true weight=1
      IKMarkerTask RWRA: apply=true weight=1
      IKMarkerTask RWRB: apply=true weight=1
      IKMarkerTask RFIN: apply=true weight=1
      IKMarkerTask RASI: apply=true weight=1
      IKMarkerTask RPSI: apply=true weight=1
      IKMarkerTask LUPA: apply=true weight=1
      IKMarkerTask LELB: apply=true weight=1
      IKMarkerTask LFRM: apply=true weight=1
      IKMarkerTask LWRA: apply=true weight=1
      IKMarkerTask LWRB: apply=true weight=1
      IKMarkerTask LFIN: apply=true weight=1
      IKMarkerTask LASI: apply=true weight=1
      IKMarkerTask LPSI: apply=true weight=1
      IKMarkerTask RBAK: apply=true weight=1
